R0 := 6378137
μ := 3.9860047e14
h_x_y(x, y) := sqrt(x^2 + y^2) - R0
calculate_T_period(R) := 2*π*sqrt(R^3/μ)
R_x_y(x, y) := sqrt(x^2 + y^2)
R3(x, y) := R_x_y(x, y)^3
D(x, y) :=
    R2 ← R3(y[0], y[1])
    [y[2]; y[3]; -μ/R2*y[0]; -μ/R2*y[1]]
h0 := 1000000
Rs := R0 + h0
t := 0
t_end := 10000
t_step := 1
params := [0; Rs; sqrt(μ/Rs); 0]
TOL := 10^-10
CTOL := 10^-10
benchmark_test(t, t_end, t_step, p_params) := rkfixed(p_params, t, t_end, (t_end - t)/t_step, D)
regular_calculation(t, t_end, t_step, p_params) :=
    results ← rkfixed(p_params, t, t_end, (t_end - t)/t_step, D)
    WRITEPRN("output.tr", results)
main(run_type, t_step) :=
    benchmark_test(t, t_end, t_step, params) if run_type == "benchmark"
    regular_calculation(t, t_end, t_step, params) if run_type == "regular"
benchmark(run_type, t_step) :=
    startTime ← time(1)
    main(run_type, t_step)
    endTime ← time(1)
    delta ← endTime - startTime
    delta
0.063
0.406
4.15
run_types := ["benchmark"; "regular"]
0.172
1.014
steps := [1; 0.1; 0.01]
10.062
times :=
    r ← [1; 0; 0]
    for i ∈ 0 .. 1
        for j ∈ 0 .. 2
            r[i*3 + j] ← benchmark(run_types[i], steps[j])
    r
WRITEPRN("results.txt", times) = [0.0380001; 0.538; 5.634; 0.124; 1.15; 11.398]
